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/batch
! ANSYS input file written by Workbench version 2020 R1
! File used for geometry attach: C:\Users\mofid\Desktop\Ex\muffler.step
/title,muffler--Harmonic Acoustics (A5)
/com,--- Data in consistent MKS units. See Solving Units in the help system for more information.
/units,MKS
/prep7
! Turn off shape checking because checks already performed inside WB mesher.
! See help system for more information.
SHPP,OFF,,NOWARN
etcon,set             ! allow ANSYS to choose best KEYOP's for 180x elements
/com,*********** Nodes for the whole assembly ***********
nblock,3,,9091
(1i9,3e20.9e3)
        1     9.750000000E-01    -1.005610153E-01     8.456192698E-03
        2     9.500000000E-01    -1.005610153E-01     8.456192698E-03
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-1
/com,*********** Elements for Body 1 "muffler-FreeParts|id2" ***********
et,1,186
keyo,1,2,1          ! set full integration on SOLID186
eblock,19,solid,,102
(19i9)
        1        1        1        1        0        0        0        0       20        0      331     1867     2014     2013     1877     1938     2016     2015     1936
     2040     2426     2085     2037     2274     2430     2271     2270     2039     2428     2427     2084
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-1
/com,*********** Elements for Body 2 "muffler-FreeParts|id5" ***********
et,2,187
eblock,19,solid,,668
(19i9)
        2        2        2        2        0        0        0        0       10        0      705     4028     4190     4082     4180     4604     4832     4602     4603
     5263     4831
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-1
/com,*********** Elements for Body 3 "muffler-FreeParts|id8" ***********
et,3,186
keyo,3,2,1          ! set full integration on SOLID186
eblock,19,solid,,110
(19i9)
        3        3        3        3        0        0        0        0       20        0      221     1245     1272     1308     1299     1324     1321     1317     1318
     1423     1524     1617     1424     1674     1665     1663     1668     1425     1525     1645     1618
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-1
/com,*********** Elements for Body 4 "muffler-FreeParts|id11" ***********
et,4,187
eblock,19,solid,,1089
(19i9)
        4        4        4        4        0        0        0        0       10        0     1827     6454     6483     6537     6536     8069     8172     8073     8072
     8171     8265
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-1
/com,*********** Elements for Body 5 "muffler-FreeParts|id14" ***********
et,5,186
keyo,5,2,1          ! set full integration on SOLID186
eblock,19,solid,,132
(19i9)
        5        5        5        5        0        0        0        0       20        0       89      507      540      584      573      602      599      595      596
      717      840      953      718     1020     1011     1009     1014      719      841      987      954
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-1
/com,*********** Elements for Body 6 "muffler-FreeParts|id17" ***********
et,6,186
keyo,6,2,1          ! set full integration on SOLID186
eblock,19,solid,,132
(19i9)
        6        6        6        6        0        0        0        0       20        0      573     3232     3265     3309     3298     3327     3324     3320     3321
     3442     3565     3678     3443     3745     3736     3734     3739     3444     3566     3712     3679
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-1
/com,*********** Elements for Body 7 "muffler-FreeParts|id20" ***********
et,7,187
eblock,19,solid,,454
(19i9)
        7        7        7        7        0        0        0        0       10        0     1373     5300     5392     5432     5393     5620     6081     5623     5621
     6074     6087
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-1
/com,*********** Elements for Body 8 "muffler-FreeParts|id23" ***********
et,8,186
keyo,8,2,1          ! set full integration on SOLID186
eblock,19,solid,,140
(19i9)
        8        8        8        8        0        0        0        0       20        0      433     2465     2531     2489     2525     2562     2551     2558     2552
     2704     2803     2802     2703     2993     2991     2997     2998     2705     2952     2804     2939
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-1
/com,*********** Elements for Body 9 "muffler-FreeParts|id26" ***********
et,9,186
keyo,9,2,1          ! set full integration on SOLID186
eblock,19,solid,,88
(19i9)
        9        9        9        9        0        0        0        0       20        0        1        1       22       50       43       64       61       57       58
      147      226      299      148      346      337      335      340      149      227      321      300
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-1
/com,*********** Send User Defined Coordinate System(s) ***********
csys,0
toffst,273.15,  ! Temperature offset from absolute zero
/com,*********** Set Reference Temperature ***********
tref,22.
/com,*********** Send Materials ***********
Temperature = 'TEMP' ! Temperature
MP,ALPX,1,1.2e-05,	! C^-1
MP,RSVX,1,1.7e-07,	! kg m^3 A^-2 s^-3
MP,EX,1,200000000000,	! Pa
MP,NUXY,1,0.3,
MP,MURX,1,10000,
MP,DENS,1,7850,	! kg m^-3
MP,KXX,1,60.5,	! W m^-1 C^-1
MP,C,1,434,	! J kg^-1 C^-1

Temperature = 'TEMP' ! Temperature
MP,ALPX,2,1.2e-05,	! C^-1
MP,RSVX,2,1.7e-07,	! kg m^3 A^-2 s^-3
MP,EX,2,200000000000,	! Pa
MP,NUXY,2,0.3,
MP,MURX,2,10000,
MP,DENS,2,7850,	! kg m^-3
MP,KXX,2,60.5,	! W m^-1 C^-1
MP,C,2,434,	! J kg^-1 C^-1

Temperature = 'TEMP' ! Temperature
MP,ALPX,3,1.2e-05,	! C^-1
MP,RSVX,3,1.7e-07,	! kg m^3 A^-2 s^-3
MP,EX,3,200000000000,	! Pa
MP,NUXY,3,0.3,
MP,MURX,3,10000,
MP,DENS,3,7850,	! kg m^-3
MP,KXX,3,60.5,	! W m^-1 C^-1
MP,C,3,434,	! J kg^-1 C^-1

Temperature = 'TEMP' ! Temperature
MP,ALPX,4,1.2e-05,	! C^-1
MP,RSVX,4,1.7e-07,	! kg m^3 A^-2 s^-3
MP,EX,4,200000000000,	! Pa
MP,NUXY,4,0.3,
MP,MURX,4,10000,
MP,DENS,4,7850,	! kg m^-3
MP,KXX,4,60.5,	! W m^-1 C^-1
MP,C,4,434,	! J kg^-1 C^-1

Temperature = 'TEMP' ! Temperature
MP,ALPX,5,1.2e-05,	! C^-1
MP,RSVX,5,1.7e-07,	! kg m^3 A^-2 s^-3
MP,EX,5,200000000000,	! Pa
MP,NUXY,5,0.3,
MP,MURX,5,10000,
MP,DENS,5,7850,	! kg m^-3
MP,KXX,5,60.5,	! W m^-1 C^-1
MP,C,5,434,	! J kg^-1 C^-1

Temperature = 'TEMP' ! Temperature
MP,ALPX,6,1.2e-05,	! C^-1
MP,RSVX,6,1.7e-07,	! kg m^3 A^-2 s^-3
MP,EX,6,200000000000,	! Pa
MP,NUXY,6,0.3,
MP,MURX,6,10000,
MP,DENS,6,7850,	! kg m^-3
MP,KXX,6,60.5,	! W m^-1 C^-1
MP,C,6,434,	! J kg^-1 C^-1

Temperature = 'TEMP' ! Temperature
MP,ALPX,7,1.2e-05,	! C^-1
MP,RSVX,7,1.7e-07,	! kg m^3 A^-2 s^-3
MP,EX,7,200000000000,	! Pa
MP,NUXY,7,0.3,
MP,MURX,7,10000,
MP,DENS,7,7850,	! kg m^-3
MP,KXX,7,60.5,	! W m^-1 C^-1
MP,C,7,434,	! J kg^-1 C^-1

Temperature = 'TEMP' ! Temperature
MP,ALPX,8,1.2e-05,	! C^-1
MP,RSVX,8,1.7e-07,	! kg m^3 A^-2 s^-3
MP,EX,8,200000000000,	! Pa
MP,NUXY,8,0.3,
MP,MURX,8,10000,
MP,DENS,8,7850,	! kg m^-3
MP,KXX,8,60.5,	! W m^-1 C^-1
MP,C,8,434,	! J kg^-1 C^-1

Temperature = 'TEMP' ! Temperature
MP,ALPX,9,1.2e-05,	! C^-1
MP,RSVX,9,1.7e-07,	! kg m^3 A^-2 s^-3
MP,EX,9,200000000000,	! Pa
MP,NUXY,9,0.3,
MP,MURX,9,10000,
MP,DENS,9,7850,	! kg m^-3
MP,KXX,9,60.5,	! W m^-1 C^-1
MP,C,9,434,	! J kg^-1 C^-1

!************************* Model Summary ********************
!muffler-FreeParts|id2,	Structural Steel,	matid,	1
!muffler-FreeParts|id5,	Structural Steel,	matid,	2
!muffler-FreeParts|id8,	Structural Steel,	matid,	3
!muffler-FreeParts|id11,	Structural Steel,	matid,	4
!muffler-FreeParts|id14,	Structural Steel,	matid,	5
!muffler-FreeParts|id17,	Structural Steel,	matid,	6
!muffler-FreeParts|id20,	Structural Steel,	matid,	7
!muffler-FreeParts|id23,	Structural Steel,	matid,	8
!muffler-FreeParts|id26,	Structural Steel,	matid,	9
!************************* End Model Summary ********************
/com,*********** Create Contact "Contact Region" ***********
*set,tid,11
*set,cid,10
r,tid
r,cid
et,tid,170
et,cid,174
eblock,10,,,29
(15i9)
     4838       11       11       11        0     1939     1941     1953     1955     2276     2283     2308     2278
     4839       11       11       11        0     1940     1939     1955     1954     2275     2278     2311     2281
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-1
eblock,10,,,29
(15i9)
     4867       10       10       10        0     1939     1941     1953     1955     2276     2283     2308     2278
     4868       10       10       10        0     1940     1939     1955     1954     2275     2278     2311     2281
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-1
eblock,10,,,37
(15i9)
     4896       10       11       10        0     3970     3972     4154     4154     4191     4206     4154     4195
     4897       10       11       10        0     3972     4054     4154     4154     4204     4694     4154     4206
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-1
eblock,10,,,37
(15i9)
     4933       11       10       11        0     3970     3972     4154     4154     4191     4206     4154     4195
     4934       11       10       11        0     3972     4054     4154     4154     4204     4694     4154     4206
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-1
keyo,cid,8,2               ! auto create asymmetric contact (from Program Controlled setting)
keyo,cid,10,0              ! adjust contact stiffness each NR iteration (from Program Controlled setting)
keyo,cid,12,5              ! bonded always
keyo,cid,18,1              ! small sliding turned on by application
keyo,cid,2,0               ! augmented Lagrange (from Program Controlled setting)
keyo,cid,4,0               ! on Gauss point (from Program Controlled setting)
keyo,cid,9,1               ! ignore initial gaps/penetration
keyo,cid,7,0               ! No Prediction
rmod,tid,3,10.      ! FKN
rmod,tid,5,0.       ! ICONT
rmod,tid,6,0.       ! PINB
rmod,tid,10,0.      ! CNOF
rmod,tid,12,0.      ! FKT
rmod,tid,36,50      ! WB DSID
rmod,cid,3,10.      ! FKN
rmod,cid,5,0.       ! ICONT
rmod,cid,6,0.       ! PINB
rmod,cid,10,0.      ! CNOF
rmod,cid,12,0.      ! FKT
rmod,cid,36,50      ! WB DSID
/com,*********** Create Contact "Contact Region 2" ***********
*set,tid,13
*set,cid,12
r,tid
r,cid
et,tid,170
et,cid,174
eblock,10,,,17
(15i9)
     4970       13       13       13        0     1939     1941     1953     1955     2276     2283     2308     2278
     4971       13       13       13        0     1940     1939     1955     1954     2275     2278     2311     2281
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-1
eblock,10,,,17
(15i9)
     4987       12       12       12        0     1939     1941     1953     1955     2276     2283     2308     2278
     4988       12       12       12        0     1940     1939     1955     1954     2275     2278     2311     2281
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-1
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eblock,10,,,11
(15i9)
     5015       13       12       13        0     1331     1332     1328     1325     1696     1689     1682     1683
     5016       13       12       13        0     1331     1325     1336     1333     1683     1684     1700     1697
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-1
keyo,cid,8,2               ! auto create asymmetric contact (from Program Controlled setting)
keyo,cid,10,0              ! adjust contact stiffness each NR iteration (from Program Controlled setting)
keyo,cid,12,5              ! bonded always
keyo,cid,18,1              ! small sliding turned on by application
keyo,cid,2,0               ! augmented Lagrange (from Program Controlled setting)
keyo,cid,4,0               ! on Gauss point (from Program Controlled setting)
keyo,cid,9,1               ! ignore initial gaps/penetration
keyo,cid,7,0               ! No Prediction
rmod,tid,3,10.      ! FKN
rmod,tid,5,0.       ! ICONT
rmod,tid,6,0.       ! PINB
rmod,tid,10,0.      ! CNOF
rmod,tid,12,0.      ! FKT
rmod,tid,36,53      ! WB DSID
rmod,cid,3,10.      ! FKN
rmod,cid,5,0.       ! ICONT
rmod,cid,6,0.       ! PINB
rmod,cid,10,0.      ! CNOF
rmod,cid,12,0.      ! FKT
rmod,cid,36,53      ! WB DSID
/com,*********** Create Contact "Contact Region 3" ***********
*set,tid,15
*set,cid,14
r,tid
r,cid
et,tid,170
et,cid,174
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eblock,10,,,80
(15i9)
     5274       15       14       15        0     1410     1411     1420     1401     1857     1859     1840     1839
     5275       15       14       15        0     1409     1412     1411     1410     1856     1858     1857     1855
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-1
keyo,cid,8,2               ! auto create asymmetric contact (from Program Controlled setting)
keyo,cid,10,0              ! adjust contact stiffness each NR iteration (from Program Controlled setting)
keyo,cid,12,5              ! bonded always
keyo,cid,18,1              ! small sliding turned on by application
keyo,cid,2,0               ! augmented Lagrange (from Program Controlled setting)
keyo,cid,4,0               ! on Gauss point (from Program Controlled setting)
keyo,cid,9,1               ! ignore initial gaps/penetration
keyo,cid,7,0               ! No Prediction
rmod,tid,3,10.      ! FKN
rmod,tid,5,0.       ! ICONT
rmod,tid,6,0.       ! PINB
rmod,tid,10,0.      ! CNOF
rmod,tid,12,0.      ! FKT
rmod,tid,36,56      ! WB DSID
rmod,cid,3,10.      ! FKN
rmod,cid,5,0.       ! ICONT
rmod,cid,6,0.       ! PINB
rmod,cid,10,0.      ! CNOF
rmod,cid,12,0.      ! FKT
rmod,cid,36,56      ! WB DSID
/com,*********** Create Contact "Contact Region 4" ***********
*set,tid,17
*set,cid,16
r,tid
r,cid
et,tid,170
et,cid,174
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eblock,10,,,60
(15i9)
     5524       17       16       17        0     6203     6494     6206     6206     6566     6584     6206     6561
     5525       17       16       17        0     6200     6205     6494     6494     6539     6580     6494     6545
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-1
keyo,cid,8,2               ! auto create asymmetric contact (from Program Controlled setting)
keyo,cid,10,0              ! adjust contact stiffness each NR iteration (from Program Controlled setting)
keyo,cid,12,5              ! bonded always
keyo,cid,18,1              ! small sliding turned on by application
keyo,cid,2,0               ! augmented Lagrange (from Program Controlled setting)
keyo,cid,4,0               ! on Gauss point (from Program Controlled setting)
keyo,cid,9,1               ! ignore initial gaps/penetration
keyo,cid,7,0               ! No Prediction
rmod,tid,3,10.      ! FKN
rmod,tid,5,0.       ! ICONT
rmod,tid,6,0.       ! PINB
rmod,tid,10,0.      ! CNOF
rmod,tid,12,0.      ! FKT
rmod,tid,36,59      ! WB DSID
rmod,cid,3,10.      ! FKN
rmod,cid,5,0.       ! ICONT
rmod,cid,6,0.       ! PINB
rmod,cid,10,0.      ! CNOF
rmod,cid,12,0.      ! FKT
rmod,cid,36,59      ! WB DSID
/com,*********** Create Contact "Contact Region 5" ***********
*set,tid,19
*set,cid,18
r,tid
r,cid
et,tid,170
et,cid,174
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eblock,10,,,11
(15i9)
     5605       19       18       19        0      599      595      596      602     1011     1009     1014     1020
     5606       19       18       19        0      691      602      596      714     1026     1014     1015     1212
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-1
keyo,cid,8,2               ! auto create asymmetric contact (from Program Controlled setting)
keyo,cid,10,0              ! adjust contact stiffness each NR iteration (from Program Controlled setting)
keyo,cid,12,5              ! bonded always
keyo,cid,18,1              ! small sliding turned on by application
keyo,cid,2,0               ! augmented Lagrange (from Program Controlled setting)
keyo,cid,4,0               ! on Gauss point (from Program Controlled setting)
keyo,cid,9,1               ! ignore initial gaps/penetration
keyo,cid,7,0               ! No Prediction
rmod,tid,3,10.      ! FKN
rmod,tid,5,0.       ! ICONT
rmod,tid,6,0.       ! PINB
rmod,tid,10,0.      ! CNOF
rmod,tid,12,0.      ! FKT
rmod,tid,36,62      ! WB DSID
rmod,cid,3,10.      ! FKN
rmod,cid,5,0.       ! ICONT
rmod,cid,6,0.       ! PINB
rmod,cid,10,0.      ! CNOF
rmod,cid,12,0.      ! FKT
rmod,cid,36,62      ! WB DSID
/com,*********** Create Contact "Contact Region 6" ***********
*set,tid,21
*set,cid,20
r,tid
r,cid
et,tid,170
et,cid,174
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eblock,10,,,11
(15i9)
     5649       21       20       21        0     3334     3335     3331     3328     3767     3760     3753     3754
     5650       21       20       21        0     3334     3328     3340     3339     3754     3755     3777     3768
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-1
keyo,cid,8,2               ! auto create asymmetric contact (from Program Controlled setting)
keyo,cid,10,0              ! adjust contact stiffness each NR iteration (from Program Controlled setting)
keyo,cid,12,5              ! bonded always
keyo,cid,18,1              ! small sliding turned on by application
keyo,cid,2,0               ! augmented Lagrange (from Program Controlled setting)
keyo,cid,4,0               ! on Gauss point (from Program Controlled setting)
keyo,cid,9,1               ! ignore initial gaps/penetration
keyo,cid,7,0               ! No Prediction
rmod,tid,3,10.      ! FKN
rmod,tid,5,0.       ! ICONT
rmod,tid,6,0.       ! PINB
rmod,tid,10,0.      ! CNOF
rmod,tid,12,0.      ! FKT
rmod,tid,36,65      ! WB DSID
rmod,cid,3,10.      ! FKN
rmod,cid,5,0.       ! ICONT
rmod,cid,6,0.       ! PINB
rmod,cid,10,0.      ! CNOF
rmod,cid,12,0.      ! FKT
rmod,cid,36,65      ! WB DSID
/com,*********** Create Contact "Contact Region 7" ***********
*set,tid,23
*set,cid,22
r,tid
r,cid
et,tid,170
et,cid,174
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eblock,10,,,96
(15i9)
     6020       23       22       23        0      633      619      630      632     1063     1062     1095     1098
     6021       23       22       23        0      634      620      619      633     1066     1061     1063     1100
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-1
keyo,cid,8,2               ! auto create asymmetric contact (from Program Controlled setting)
keyo,cid,10,0              ! adjust contact stiffness each NR iteration (from Program Controlled setting)
keyo,cid,12,5              ! bonded always
keyo,cid,18,1              ! small sliding turned on by application
keyo,cid,2,0               ! augmented Lagrange (from Program Controlled setting)
keyo,cid,4,0               ! on Gauss point (from Program Controlled setting)
keyo,cid,9,1               ! ignore initial gaps/penetration
keyo,cid,7,0               ! No Prediction
rmod,tid,3,10.      ! FKN
rmod,tid,5,0.       ! ICONT
rmod,tid,6,0.       ! PINB
rmod,tid,10,0.      ! CNOF
rmod,tid,12,0.      ! FKT
rmod,tid,36,68      ! WB DSID
rmod,cid,3,10.      ! FKN
rmod,cid,5,0.       ! ICONT
rmod,cid,6,0.       ! PINB
rmod,cid,10,0.      ! CNOF
rmod,cid,12,0.      ! FKT
rmod,cid,36,68      ! WB DSID
/com,*********** Create Contact "Contact Region 8" ***********
*set,tid,25
*set,cid,24
r,tid
r,cid
et,tid,170
et,cid,174
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eblock,10,,,96
(15i9)
     6468       25       24       25        0     3358     3344     3343     3342     3787     3785     3783     3784
     6469       25       24       25        0     3359     3345     3344     3358     3790     3786     3787     3825
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-1
keyo,cid,8,2               ! auto create asymmetric contact (from Program Controlled setting)
keyo,cid,10,0              ! adjust contact stiffness each NR iteration (from Program Controlled setting)
keyo,cid,12,5              ! bonded always
keyo,cid,18,1              ! small sliding turned on by application
keyo,cid,2,0               ! augmented Lagrange (from Program Controlled setting)
keyo,cid,4,0               ! on Gauss point (from Program Controlled setting)
keyo,cid,9,1               ! ignore initial gaps/penetration
keyo,cid,7,0               ! No Prediction
rmod,tid,3,10.      ! FKN
rmod,tid,5,0.       ! ICONT
rmod,tid,6,0.       ! PINB
rmod,tid,10,0.      ! CNOF
rmod,tid,12,0.      ! FKT
rmod,tid,36,71      ! WB DSID
rmod,cid,3,10.      ! FKN
rmod,cid,5,0.       ! ICONT
rmod,cid,6,0.       ! PINB
rmod,cid,10,0.      ! CNOF
rmod,cid,12,0.      ! FKT
rmod,cid,36,71      ! WB DSID
/com,*********** Create Contact "Contact Region 9" ***********
*set,tid,27
*set,cid,26
r,tid
r,cid
et,tid,170
et,cid,174
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eblock,10,,,55
(15i9)
     6739       27       26       27        0     5268     5270     5271     5271     5433     5453     5271     5434
     6740       27       26       27        0     5269     5274     5271     5271     5445     5460     5271     5442
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-1
keyo,cid,8,2               ! auto create asymmetric contact (from Program Controlled setting)
keyo,cid,10,0              ! adjust contact stiffness each NR iteration (from Program Controlled setting)
keyo,cid,12,5              ! bonded always
keyo,cid,18,1              ! small sliding turned on by application
keyo,cid,2,0               ! augmented Lagrange (from Program Controlled setting)
keyo,cid,4,0               ! on Gauss point (from Program Controlled setting)
keyo,cid,9,1               ! ignore initial gaps/penetration
keyo,cid,7,0               ! No Prediction
rmod,tid,3,10.      ! FKN
rmod,tid,5,0.       ! ICONT
rmod,tid,6,0.       ! PINB
rmod,tid,10,0.      ! CNOF
rmod,tid,12,0.      ! FKT
rmod,tid,36,74      ! WB DSID
rmod,cid,3,10.      ! FKN
rmod,cid,5,0.       ! ICONT
rmod,cid,6,0.       ! PINB
rmod,cid,10,0.      ! CNOF
rmod,cid,12,0.      ! FKT
rmod,cid,36,74      ! WB DSID
/com,*********** Create Contact "Contact Region 10" ***********
*set,tid,29
*set,cid,28
r,tid
r,cid
et,tid,170
et,cid,174
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eblock,10,,,20
(15i9)
     6836       29       28       29        0     2558     2552     2562     2551     2997     2998     2993     2991
     6837       29       28       29        0     2557     2556     2552     2558     3006     2996     2997     3008
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-1
keyo,cid,8,2               ! auto create asymmetric contact (from Program Controlled setting)
keyo,cid,10,0              ! adjust contact stiffness each NR iteration (from Program Controlled setting)
keyo,cid,12,5              ! bonded always
keyo,cid,18,1              ! small sliding turned on by application
keyo,cid,2,0               ! augmented Lagrange (from Program Controlled setting)
keyo,cid,4,0               ! on Gauss point (from Program Controlled setting)
keyo,cid,9,1               ! ignore initial gaps/penetration
keyo,cid,7,0               ! No Prediction
rmod,tid,3,10.      ! FKN
rmod,tid,5,0.       ! ICONT
rmod,tid,6,0.       ! PINB
rmod,tid,10,0.      ! CNOF
rmod,tid,12,0.      ! FKT
rmod,tid,36,77      ! WB DSID
rmod,cid,3,10.      ! FKN
rmod,cid,5,0.       ! ICONT
rmod,cid,6,0.       ! PINB
rmod,cid,10,0.      ! CNOF
rmod,cid,12,0.      ! FKT
rmod,cid,36,77      ! WB DSID
/com,*********** Create Contact "Contact Region 11" ***********
*set,tid,31
*set,cid,30
r,tid
r,cid
et,tid,170
et,cid,174
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eblock,10,,,5
(15i9)
     6883       31       30       31        0     5276     5279     5278     5278     5493     5507     5278     5492
     6884       31       30       31        0     5279     5276     5280     5280     5493     5494     5280     5515
     6885       31       30       31        0     5280     5277     5275     5275     5502     5486     5275     5487
     6886       31       30       31        0     5275     5281     5280     5280     5488     5523     5280     5487
     6887       31       30       31        0     5276     5277     5280     5280     5491     5502     5280     5494
-1
keyo,cid,8,2               ! auto create asymmetric contact (from Program Controlled setting)
keyo,cid,10,0              ! adjust contact stiffness each NR iteration (from Program Controlled setting)
keyo,cid,12,5              ! bonded always
keyo,cid,18,1              ! small sliding turned on by application
keyo,cid,2,0               ! augmented Lagrange (from Program Controlled setting)
keyo,cid,4,0               ! on Gauss point (from Program Controlled setting)
keyo,cid,9,1               ! ignore initial gaps/penetration
keyo,cid,7,0               ! No Prediction
rmod,tid,3,10.      ! FKN
rmod,tid,5,0.       ! ICONT
rmod,tid,6,0.       ! PINB
rmod,tid,10,0.      ! CNOF
rmod,tid,12,0.      ! FKT
rmod,tid,36,80      ! WB DSID
rmod,cid,3,10.      ! FKN
rmod,cid,5,0.       ! ICONT
rmod,cid,6,0.       ! PINB
rmod,cid,10,0.      ! CNOF
rmod,cid,12,0.      ! FKT
rmod,cid,36,80      ! WB DSID
/com,*********** Create Contact "Contact Region 12" ***********
*set,tid,33
*set,cid,32
r,tid
r,cid
et,tid,170
et,cid,174
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eblock,10,,,84
(15i9)
     7084       33       32       33        0     2607     2591     2605     2606     3079     3078     3110     3111
     7085       33       32       33        0     2608     2593     2591     2607     3085     3077     3079     3113
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-1
keyo,cid,8,2               ! auto create asymmetric contact (from Program Controlled setting)
keyo,cid,10,0              ! adjust contact stiffness each NR iteration (from Program Controlled setting)
keyo,cid,12,5              ! bonded always
keyo,cid,18,1              ! small sliding turned on by application
keyo,cid,2,0               ! augmented Lagrange (from Program Controlled setting)
keyo,cid,4,0               ! on Gauss point (from Program Controlled setting)
keyo,cid,9,1               ! ignore initial gaps/penetration
keyo,cid,7,0               ! No Prediction
rmod,tid,3,10.      ! FKN
rmod,tid,5,0.       ! ICONT
rmod,tid,6,0.       ! PINB
rmod,tid,10,0.      ! CNOF
rmod,tid,12,0.      ! FKT
rmod,tid,36,83      ! WB DSID
rmod,cid,3,10.      ! FKN
rmod,cid,5,0.       ! ICONT
rmod,cid,6,0.       ! PINB
rmod,cid,10,0.      ! CNOF
rmod,cid,12,0.      ! FKT
rmod,cid,36,83      ! WB DSID
/com,*********** Create Contact "Contact Region 13" ***********
*set,tid,35
*set,cid,34
r,tid
r,cid
et,tid,170
et,cid,174
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eblock,10,,,11
(15i9)
     7219       35       34       35        0       71       72       68       65      368      361      354      355
     7220       35       34       35        0       71       65       77       76      355      356      378      369
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-1
keyo,cid,8,2               ! auto create asymmetric contact (from Program Controlled setting)
keyo,cid,10,0              ! adjust contact stiffness each NR iteration (from Program Controlled setting)
keyo,cid,12,5              ! bonded always
keyo,cid,18,1              ! small sliding turned on by application
keyo,cid,2,0               ! augmented Lagrange (from Program Controlled setting)
keyo,cid,4,0               ! on Gauss point (from Program Controlled setting)
keyo,cid,9,1               ! ignore initial gaps/penetration
keyo,cid,7,0               ! No Prediction
rmod,tid,3,10.      ! FKN
rmod,tid,5,0.       ! ICONT
rmod,tid,6,0.       ! PINB
rmod,tid,10,0.      ! CNOF
rmod,tid,12,0.      ! FKT
rmod,tid,36,86      ! WB DSID
rmod,cid,3,10.      ! FKN
rmod,cid,5,0.       ! ICONT
rmod,cid,6,0.       ! PINB
rmod,cid,10,0.      ! CNOF
rmod,cid,12,0.      ! FKT
rmod,cid,36,86      ! WB DSID
nsel,all
esel,all

/com,*********** Create Acoustic Far-field Radiation Surface ***********
esel,s,type,,1
esel,a,type,,2,9
CMBLOCK,_CM_EQV_SRC_SURFACE109,NODE,     4508
(8i10)
        57        58        59        60        61        62        63        64
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cmsel,s,_CM_EQV_SRC_SURFACE109
sf,_CM_EQV_SRC_SURFACE109,mxwf,
allsel,all

ecpchg
fini
/solu
antype,harm
hropt,auto
thexpand,off     ! ignore thermal strains
kbc,1
harfrq,0.000000,50000000.000000
nsub,10
asol,scat,off
outres,erase
outres,all,none
outres,nsol,all
outres,eangl,all
outres,etmp,all
outres,veng,all
outres,cont,all
! *********** WB SOLVE COMMAND ***********
! check interactive state
*get,ANSINTER_,active,,int
*if,ANSINTER_,ne,0,then
/eof
*endif
solve
/com *************** Write FE CONNECTORS *********
CEWRITE,file,ce,,INTE
fini
/post1
fini
